// SBML level 2 version 4

model LotkaVolterra()

  // Compartments:
  compartment cell = 1;

  // Species:
  species Prey in cell = 30/cell;  // substance in item
  species Predator in cell = 5/cell;  // substance in item

  // Parameters:
  alpha = 100 per_second;
  beta = 0.001 per_item_second;
  gamma = 50 per_second;
  time_delay = 0.75 per_second;

  // Reactions:
  PreyGrowth: Prey => 2 Prey; alpha*Prey^1;
  Predation: Prey + 2 Predator => 3 Predator; beta*Prey^1*Predator^2;
  PredatorDeath: 1.5 Predator => ; gamma*Predator^1.5;

  // Unit definitions:
  unit per_second = 1 / second;
  unit per_item_second = 1 / (item * second);
end
